// COMSOL Multiphysics 5.6.0.401 model "gPlate.mph"
// Outline of the model tree

Parameters
  rho = 464.058429965401
  Ex = 9.65333266247676E9
  Ey = 1.45160639750787E9
  Ez = 5.64340585607932E8
  Gxy = 6.47082140473929E8
  Gyz = 1.44407583766584E7
  Gxz = 6.50660039481648E8
  vxy = 0.461351046593582
  vyz = 0.0654722329787466
  vxz = 0.174998395143609
  alpha = 14.987397148992
  beta = 4.58175959124062E-7
  L = 0.582056220938954
  W = 0.209193052717631
  T = 0.00470267668483055
  excX = 2[cm]
  excY = 2[cm]
  measX = L-2[cm]
  measY = W-2[cm]

Functions
  gp1: GaussianPulse | location = 0.002; sigma = 0.000001

Common definitions
  mpf1: ParticipationFactors

Geometry
  geom1 "Geometry 1" (3D, length unit m)
    hex1: Hexahedron "wedgeL" | p = {{0, 0, L, L, 0, 0, L, L}, {0, W, W, 0, 0, W, W, 0}, {0, 0, 0, 0, T, T, T, T}}
    cyl1: Cylinder "excitation" | pos = {excX, excY, 0[mm]}; r = 0.003; h = 0.01
    cyl2: Cylinder "measurement" | pos = {measX, measY, 0[mm]}; r = 0.003; h = 0.01
    int1: Intersection | input = cyl1, hex1; keep = on
    int2: Intersection | input = cyl2, hex1; keep = on
    del1: Delete "Delete Entities 1" | input = cyl1(1) domains 1; cyl2(1) domains 1
    fin: Finalize "Form Union"
    igv1: IgnoreVertices (disabled) | input = fin(1) points 6, 8, 10, 12
    ige1: IgnoreEdges (disabled) | input = igv1(1) edges 9-11, 14, 15, 17, 18, 20

Physics
  solid: SolidMechanics on all domains
    dependent variable u = {u, v, w}
    lemm1: LinearElasticModel "Linear Elastic Material 1" (default)
      SolidModel = Orthotropic
      Evector_mat = userdef
      Evector = {Ex, Ey, Ez}
      nuvector_mat = userdef
      nuvector = {vxy, vyz, vxz}
      Gvector_mat = userdef
      Gvector = {Gxy, Gyz, Gxz}
      rho_mat = userdef
      rho = rho
      dmp1: Damping on all domains
        DampingType = RayleighDamping
        alpha_dM = alpha
        beta_dK = beta
        InputParameters = AlphaBeta
        eta_Evector_mat = userdef
        eta_Evector = {0, 0, 0}
        eta_Gvector_mat = userdef
        eta_Gvector = {0, 0, 0}
    free1: Free (default)
    init1: init "Initial Values 1" (default)
    roll1: Roller "SS - ALL" (disabled) on boundaries 1, 2, 18
    roll2: Roller "SS - AE1" (disabled) on boundaries 1, 2
    roll5: Roller "SS - AE2" (disabled) on boundaries 1
    roll6: Roller "SS - AE3" (disabled) on boundaries 2, 18
    roll7: Roller "SS - AE4" (disabled) on boundaries 18
    roll3: Roller "SS - OEW" (disabled) on boundaries 1, 18
    roll4: Roller "SS - OEL" (disabled) on boundaries 2
    fix1: Fixed "CC - ALL" (disabled) on boundaries 1, 2, 18
    fix2: Fixed "CC - AE1" (disabled) on boundaries 1, 2
    fix3: Fixed "CC - AE2" (disabled) on boundaries 1
    fix4: Fixed "CC - AE3" (disabled) on boundaries 2, 18
    fix5: Fixed "CC - AE4" (disabled) on boundaries 18
    bndl1: BoundaryLoad on boundaries 9 | FperArea = {0, 0, -1}; harmonicPerturbation = 0

Mesh
  mesh1 "Mesh 1"
    size: MeshSizeDefault | hmax = 0.0873; hmin = 0.0163; hauto = 6
    ftet1: FreeTet "Free Tetrahedral 1" on remaining entities

Studies
  std1 "Study 1"
    eig: Eigenfrequency | neigs = 20; shift = 20[Hz]; eigwhich = lr; conrad = 1; disabledphysics = solid/bndl1
  std2 "Study 2"
    freq: Frequency "Frequency Domain"
      plist = {40.5, 41.195495, 41.902933, 42.62252, 43.354464, 44.098978, 44.856277, 45.62658, 46.410112, 47.2071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}

Solver configurations
  sol1 "Solution 1" (study std1)
    v1: Variables "Dependent Variables 1"
    e1: Eigenvalue "Eigenvalue Solver 1" | eigvfunscale = maximum; eigvfunscaleparam = 6.19e-07
      dDef: Direct
  sol2 "Solution 2" (study std2)
    v1: Variables "Dependent Variables 1"
    s1: Stationary "Stationary Solver 1"
      p1: Parametric
        pname = freq
        plistarr = 40.5 41.195495 41.902933 42.62252 43.354464 44.098978 44.856277 45.62658 46.410112 47.2071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
        punit = Hz
        pcontinuationmode = no
      fc1: FullyCoupled | linsolver = d1
      d1: Direct "Suggested Direct Solver (solid)" | linsolver = pardiso; pivotperturb = 1.0E-9

Datasets
  dset1: Solution | solution = sol1
  cpt1: CutPoint3D | data = dset2; pointx = measX; pointy = measY; pointz = T; bndsnap = on
  dset2: Solution | solution = sol2

Evaluation groups
  std1EvgFrq: EvaluationGroup "Eigenfrequencies (Study 1)" | data = dset1
    gev1: EvalGlobal "Global Evaluation 1"
      expr = {freq*2*pi, imag(freq)/abs(freq), abs(freq)/imag(freq)/2}
      unit = {rad/s, 1, 1}
      descr = {Angular frequency, Damping ratio, Quality factor}
  std1mpf1: EvaluationGroup "Participation Factors (Study 1)" | data = dset1
    gev1: EvalGlobal "Global Evaluation 1"
      expr = {mpf1.pfLnormX, mpf1.pfLnormY, mpf1.pfLnormZ, mpf1.pfRnormX, mpf1.pfRnormY, mpf1.pfRnormZ, mpf1.mEffLX, mpf1.mEffLY, mpf1.mEffLZ, mpf1.mEffRX, mpf1.mEffRY, mpf1.mEffRZ}
      unit = {1, 1, 1, 1, 1, 1, kg, kg, kg, kg*m^2, kg*m^2, kg*m^2}
      descr = {"Participation factor, normalized, X-translation", "Participation factor, normalized, Y-translation", "Participation factor, normalized, Z-translation", "Participation factor, normalized, X-rotation", "Participation factor, normalized, Y-rotation", "Participation factor, normalized, Z-rotation", "Effective modal mass, X-translation", "Effective modal mass, Y-translation", "Effective modal mass, Z-translation", "Effective modal mass, X-rotation", "Effective modal mass, Y-rotation", "Effective modal mass, Z-rotation"}

Tables
  tbl1: Table
    // Point Evaluation 1
    freq (Hz) | Effective acceleration magnitude (m/s^2), Point: (0.095, 0.467, 0.00359)
    20 | 0.534502
    21.2 | 0.437855
    22.4 | 0.376858
    23.6 | 0.336172
    24.8 | 0.308376
    26 | 0.28951
    27.2 | 0.277351
    28.4 | 0.27066
    29.6 | 0.268835
    30.8 | 0.271765
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
Plots
  pg1: PlotGroup3D "Mode Shape (solid)" | data = dset1
    surf1: Surface | expr = solid.disp
      def: Deform "Deformation" | expr = {u, v, w}; descr = Displacement field
  pg2: PlotGroup3D "Stress (solid)" | data = dset2
    surf1: Surface | expr = solid.mises
      def: Deform "Deformation" | expr = {u, v, w}; descr = Displacement field
  pg3: PlotGroup3D "Boundary Loads (solid)" | data = dset2
    arws1: ArrowSurface "Boundary Load 1" | expr = {solid.bndl1.F_Ax, solid.bndl1.F_Ay, solid.bndl1.F_Az}
      col: Color "Color Expression" | expr = solid.bndl1.F_A_Mag
      def: Deform "Deformation" | expr = {u, v, w}; descr = Displacement field
    surf1: Surface "Gray Surfaces" | expr = 1
      def: Deform "Deformation" | expr = {u, v, w}; descr = Displacement field
      sel1: Selection on boundaries 1-11, 14, 15, 18
      tran1: Transparency | transparency = 0.8
  pg4: PlotGroup1D "1D Plot Group 4" | data = cpt1
    ptgr1: PointGraph | data = cpt1; expr = solid.uAmp_tZ; descr = Velocity amplitude, Z component

Exports
  data1: Data
    data = cpt1
    expr = solid.u_tZ
    unit = m/s
    filename = C:\Users\utente\.comsol\v56\llmatlab\FRF2Params\guitarPlates\csv_gPlates\Results\Results_5R_nR4_14_beta_2e-06_1.txt