// COMSOL Multiphysics 5.6.0.401 model "wedge_measures.mph"
// Outline of the model tree

Parameters
  rho = 397
  Ex = 1.2E10
  Ey = 0.5E9
  Ez = 6.644E8
  Gxy = 0.85E9
  Gyz = 1.25E9
  Gxz = 150000000
  vxy = 0.467
  vyz = 0.372
  vxz = 0.435
  alpha = 50
  beta = 1.25E-6
  L_1 = 446[mm]
  L_2 = 451[mm]
  L_3 = 450[mm]
  W_1 = 124[mm]
  W_2 = 131[mm]
  w_1 = 120[mm]
  w_2 = 130[mm]
  t_a = 8[mm]
  t_b = 9[mm]
  T_a = 39[mm]
  T_b = 41[mm]
  excRadius = 1[mm]

Functions
  gp1: GaussianPulse | location = 0.002; sigma = 0.0001

Couplings
  intop1: Integration on all domains

Common definitions
  mpf1: ParticipationFactors

Geometry
  geom1 "Geometry 1" (3D, length unit m)
    hex1: Hexahedron "wedgeL"
      p = 
        {0, 0, L_3, L_1, 0, 0, L_2, L_1}
        {0, W_1, W_2, 0, 0, w_1, w_2, 0}
        {0, 0, 0, 0, t_a, T_a, T_b, t_b}
    cyl2: Cylinder "P_E2" (disabled) | pos = {2[cm], 2[cm], 2[mm]}; r = excRadius; h = 0.1
    cyl1: Cylinder "P_E1" | pos = {1[cm], 1[cm], 8[mm]}; r = excRadius; h = 0.25
    cyl4: Cylinder "P_EM4" | pos = {L_2 - 8[cm], W_2 - 1[cm], 30[mm]}; r = excRadius; h = 0.1
    int1: Intersection | input = cyl1, hex1; keep = on
    int2: Intersection (disabled) | input = cyl2, hex1; keep = on; intbnd = off; face = all
    int4: Intersection | input = cyl4, hex1; keep = on
    del1: Delete "Delete Entities 1"
      input = cyl1(1) boundaries 1, 2, 4-6; cyl2(1) boundaries 1, 2, 4-6; cyl4(1) boundaries 1, 2, 4-6
    fin: Finalize "Form Union"
    igv1: IgnoreVertices (disabled) | input = fin 8, 10, 12, 14

Physics
  solid: SolidMechanics on domains 1-3
    dependent variable u = {u, v, w}
    lemm1: LinearElasticModel "Linear Elastic Material 1" (default)
      SolidModel = Orthotropic
      Evector_mat = userdef
      Evector = {Ex, Ey, Ez}
      nuvector_mat = userdef
      nuvector = {vxy, vyz, vxz}
      Gvector_mat = userdef
      Gvector = {Gxy, Gyz, Gxz}
      rho_mat = userdef
      rho = rho
      dmp1: Damping on all domains
        DampingType = RayleighDamping
        alpha_dM = alpha
        beta_dK = beta
        eta_Evector_mat = userdef
        eta_Evector = {0.1, .08, .04}
        eta_Gvector_mat = userdef
        eta_Gvector = {0.1, 0.02, 0.02}
    free1: Free (default)
    init1: init "Initial Values 1" (default)
    bndl1: BoundaryLoad "Boundary Load - point 1" on boundaries 9 | FperArea = {0, 0, -1}; harmonicPerturbation = 0
    bndl2: BoundaryLoad "Boundary Load - point 4" (disabled) on no boundaries
      FperArea = {0, 0, -1}
      harmonicPerturbation = 0
    roll1: Roller "SS - ALL" (disabled) on no boundaries
    roll2: Roller "SS - AE1" (disabled) on no boundaries
    roll5: Roller "SS - AE2" (disabled) on no boundaries
    roll6: Roller "SS - AE3" (disabled) on no boundaries
    roll7: Roller "SS - AE4" (disabled) on no boundaries
    roll3: Roller "SS - OEW" (disabled) on no boundaries
    roll4: Roller "SS - OEL" (disabled) on no boundaries
    fix1: Fixed "CC - ALL" (disabled) on no boundaries
    fix2: Fixed "CC - AE1" (disabled) on no boundaries
    fix3: Fixed "CC - AE2" (disabled) on no boundaries
    fix4: Fixed "CC - AE3" (disabled) on no boundaries
    fix5: Fixed "CC - AE4" (disabled) on no boundaries

Mesh
  mesh1 "Mesh 1" (physics-controlled)
    size: MeshSizeDefault | hauto = 3

Studies
  std1 "Study 1"
    eig: Eigenfrequency
      neigs = 20
      shift = 20[Hz]
      eigwhich = lr
      conrad = 1
      disabledphysics = {solid/roll1, solid/roll2, solid/roll3, solid/roll4, solid/fix1, solid/fix2, solid/fix3, solid/roll5, solid/roll6, solid/roll7, solid/fix4, solid/fix5, solid/bndl1, solid/bndl2}
  std2 "Study 2"
    freq: Frequency "Frequency Domain" | plist = range(600,20,1000); disabledphysics = solid/bndl2

Solver configurations
  sol1 "Solution 1" (study std1)
    v1: Variables "Dependent Variables 1"
    e1: Eigenvalue "Eigenvalue Solver 1" | eigvfunscale = maximum; eigvfunscaleparam = 4.71e-07
      dDef: Direct
  sol2 "Solution 2" (study std2)
    v1: Variables "Dependent Variables 1"
    s1: Stationary "Stationary Solver 1"
      p1: Parametric | pname = freq; plistarr = range(600,20,1000); punit = Hz; pcontinuationmode = no
      fc1: FullyCoupled | linsolver = d1
      d1: Direct "Suggested Direct Solver (solid)" | linsolver = pardiso; pivotperturb = 1.0E-9
  sol3 "Solution 2 - Copy 1" (study std2)
  sol4 "Solution 1 - Copy 1" (study std1)

Datasets
  dset1: Solution | solution = sol1
  dset2: Solution | solution = sol2
  cpt1: CutPoint3D | data = dset2; pointx = L_1- 1[cm]; pointy = 1[cm]; pointz = t_b; bndsnap = on
  cpt2: CutPoint3D | data = dset2; pointx = L_1- 2[cm]; pointy = 2[cm]; pointz = t_b; bndsnap = on
  cpt3: CutPoint3D | data = dset2; pointx = 8[cm]; pointy = 11.4[cm]; pointz = 0.9*T_a
  cpt4: CutPoint3D | data = dset2; pointx = L_3-4[cm]; pointy = W_2-1[cm]; pointz = T_b; bndsnap = on
  cpt5: CutPoint3D | data = dset2; pointx = ((L_1+L_3)/4); pointy = (W_1+ W_2)/4; pointz = 0.25*(T_a+T_b); bndsnap = on
  dset3: Solution | solution = sol3
  dset4: Solution | solution = sol4
  surf1: Surface on boundaries 4, 9, 15 | data = dset1; param = xy

Derived values
  int1: IntVolume "Volume Integration 1" on all domains | data = dset1; table = tbl1; expr = dom; descr = Entity index

Evaluation groups
  std1EvgFrq: EvaluationGroup "Eigenfrequencies (Study 1)" | data = dset1
    gev1: EvalGlobal "Global Evaluation 1"
      data = dset1
      expr = {imag(freq)/abs(freq), abs(freq)/imag(freq)/2, solid.freq}
      unit = {1, 1, }
      descr = {Damping ratio, Quality factor, Frequency}
  std1mpf1: EvaluationGroup "Participation Factors (Study 1)" | data = dset1
    gev1: EvalGlobal "Global Evaluation 1"
      expr = {mpf1.pfLnormX, mpf1.pfLnormY, mpf1.pfLnormZ, mpf1.pfRnormX, mpf1.pfRnormY, mpf1.pfRnormZ, mpf1.mEffLX, mpf1.mEffLY, mpf1.mEffLZ, mpf1.mEffRX, mpf1.mEffRY, mpf1.mEffRZ}
      unit = {1, 1, 1, 1, 1, 1, kg, kg, kg, kg*m^2, kg*m^2, kg*m^2}
      descr = {"Participation factor, normalized, X-translation", "Participation factor, normalized, Y-translation", "Participation factor, normalized, Z-translation", "Participation factor, normalized, X-rotation", "Participation factor, normalized, Y-rotation", "Participation factor, normalized, Z-rotation", "Effective modal mass, X-translation", "Effective modal mass, Y-translation", "Effective modal mass, Z-translation", "Effective modal mass, X-rotation", "Effective modal mass, Y-rotation", "Effective modal mass, Z-rotation"}

Tables
  tbl1: Table
    // Volume Integration 1
    Eigenfrequency (Hz) | Entity index (m^3)
    628.536+0.203688i | 0.00138558
    752.751+0.257591i | 0.00138558
    1289.25+0.601759i | 0.00138558
    1416.88+0.710264i | 0.00138558
    1990.67+1.32452i | 0.00138558
    2097.63+1.4619i | 0.00138558
    2620.59+2.23707i | 0.00138558
    2694.6+2.36064i | 0.00138558
    2699.79+2.36945i | 0.00138558
    2760.42+2.47345i | 0.00138558
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
Plots
  pg1: PlotGroup3D "Mode Shape (solid)" | data = dset1
    surf1: Surface | data = dset1; expr = solid.disp
      def: Deform "Deformation" | expr = {u, v, w}; descr = Displacement field
  pg2: PlotGroup3D "Stress (solid)" | data = dset2
    surf1: Surface | expr = solid.mises
      def: Deform "Deformation" | expr = {u, v, w}; descr = Displacement field
  pg3: PlotGroup3D "Boundary Loads (solid)" | data = dset2
    arws1: ArrowSurface "Boundary Load 1" | expr = {solid.bndl1.F_Ax, solid.bndl1.F_Ay, solid.bndl1.F_Az}
      col: Color "Color Expression" | expr = solid.bndl1.F_A_Mag
      def: Deform "Deformation" | expr = {u, v, w}; descr = Displacement field
    surf1: Surface "Gray Surfaces" | expr = 1
      def: Deform "Deformation" | expr = {u, v, w}; descr = Displacement field
      sel1: Selection on boundaries 1-5, 9, 15, 18
      tran1: Transparency | transparency = 0.8
  pg4: PlotGroup1D "1D Plot Group 4" | data = cpt1
    ptgr1: PointGraph | data = cpt2; expr = solid.disp

Exports
  data1: Data
    data = surf1
    expr = solid.u_tX*nx + solid.u_tZ*nz + solid.u_tY*ny
    unit = m/s
    descr = Velocity, Z component
    filename = C:\Users\utente\.comsol\v56\llmatlab\FRF2Params\wedge\wedge_mshapes.txt
    sort = on