// COMSOL Multiphysics 5.6.0.401 model "wedge_scan.mph"
// Outline of the model tree

Parameters
  rho = 397
  Ex = 14000000000
  Ey = 850000000
  Ez = 500000000
  Gxy = 1150000000
  Gyz = 34000000
  Gxz = 350000000
  vxy = 0.467
  vyz = 0.372
  vxz = 0.435
  alpha = 50
  beta = 1.25e-06
  P1x = 453.1[mm]
  P1y = 3.7[mm]
  P1z = 0.2[mm]
  P2x = 458.6[mm]
  P2y = 124.3[mm]
  P2z = 0.3[mm]
  P3x = 5[mm]
  P3y = 132.1[mm]
  P3z = 0[mm]
  P4x = 10[mm]
  P4y = 0[mm]
  P4z = 2.6[mm]
  P5x = 454.4[mm]
  P5y = 0.8[mm]
  P5z = 8.7[mm]
  P6x = 457[mm]
  P6y = 123.3[mm]
  P6z = 40.6[mm]
  P7x = 13.2[mm]
  P7y = 130.7[mm]
  P7z = 42.9[mm]
  P8x = 10.1[mm]
  P8y = 2[mm]
  P8z = 13.1[mm]
  excRadius = 2.5[mm]
  startZCyl = 8[mm]

Functions
  gp1: GaussianPulse | location = 0.002; sigma = 0.0001

Couplings
  intop1: Integration on all domains

Common definitions
  mpf1: ParticipationFactors

Geometry
  geom1 "Geometry 1" (3D, length unit m)
    hex1: Hexahedron "wedgeL"
      p = 
        {P1x, P2x, P3x, P4x, P5x, P6x, P7x, P8x}
        {P1y, P2y, P3y, P4y, P5y, P6y, P7y, P8y}
        {P1z, P2z, P3z, P4z, P5z, P6z, P7z, P8z}
    cyl1: Cylinder "P_E1" | pos = {P5x-1[cm], P5y+1[cm], startZCyl}; r = excRadius; h = 0.1
    cyl5: Cylinder "P_M2" | pos = {P8x+ 2[cm], P8y+ 2[cm], startZCyl}; r = excRadius; h = 0.1
    cyl4: Cylinder "P_M3" | pos = {P7x+8[cm], P7y-1[cm], startZCyl}; r = excRadius; h = 0.1
    cyl6: Cylinder "P_M5" | pos = {(P5x+P6x+P7x+P8x)/4, (P5y+P6y+P7y+P8y)/4, startZCyl}; r = excRadius; h = 0.1
    int1: Intersection "Int E1" | input = cyl1, hex1; keep = on
    int5: Intersection "Int M2" | input = cyl5, hex1; keep = on
    int4: Intersection "Int M3" | input = cyl4, hex1; keep = on
    int6: Intersection "Int M5" | input = cyl6, hex1; keep = on
    del1: Delete "Delete Entities 1" | input = cyl4(1) domains 1; cyl1(1) domains 1; cyl5(1) domains 1; cyl6(1) domains 1
    uni1: Union | input = selection hex1
    fin: Finalize "Form Union"
    igv1: IgnoreVertices (disabled) | input = fin 8, 10, 12, 14

Physics
  solid: SolidMechanics on all domains
    dependent variable u = {u, v, w}
    lemm1: LinearElasticModel "Linear Elastic Material 1" (default)
      SolidModel = Orthotropic
      Evector_mat = userdef
      Evector = {Ex, Ey, Ez}
      nuvector_mat = userdef
      nuvector = {vxy, vyz, vxz}
      Gvector_mat = userdef
      Gvector = {Gxy, Gyz, Gxz}
      rho_mat = userdef
      rho = rho
      dmp1: Damping on all domains
        DampingType = RayleighDamping
        alpha_dM = alpha
        beta_dK = beta
        eta_Evector_mat = userdef
        eta_Evector = {0.1, .08, .04}
        eta_Gvector_mat = userdef
        eta_Gvector = {0.1, 0.02, 0.02}
    free1: Free (default)
    init1: init "Initial Values 1" (default)
    bndl1: BoundaryLoad "Boundary Load - point 1" on boundaries 27 | FperArea = {0, 0, -1}; harmonicPerturbation = 0
    bndl2: BoundaryLoad "Boundary Load - point 4" (disabled) on no boundaries
      FperArea = {0, 0, -1}
      harmonicPerturbation = 0
    roll1: Roller "SS - ALL" (disabled) on no boundaries
    roll2: Roller "SS - AE1" (disabled) on no boundaries
    roll5: Roller "SS - AE2" (disabled) on no boundaries
    roll6: Roller "SS - AE3" (disabled) on no boundaries
    roll7: Roller "SS - AE4" (disabled) on no boundaries
    roll3: Roller "SS - OEW" (disabled) on no boundaries
    roll4: Roller "SS - OEL" (disabled) on no boundaries
    fix1: Fixed "CC - ALL" (disabled) on no boundaries
    fix2: Fixed "CC - AE1" (disabled) on no boundaries
    fix3: Fixed "CC - AE2" (disabled) on no boundaries
    fix4: Fixed "CC - AE3" (disabled) on no boundaries
    fix5: Fixed "CC - AE4" (disabled) on no boundaries

Mesh
  mesh1 "Mesh 1" (physics-controlled)

Studies
  std1 "Study 1"
    eig: Eigenfrequency
      neigs = 20
      shift = 15[Hz]
      eigwhich = lr
      conrad = 1
      disabledphysics = {solid/roll1, solid/roll2, solid/roll3, solid/roll4, solid/fix1, solid/fix2, solid/fix3, solid/roll5, solid/roll6, solid/roll7, solid/fix4, solid/fix5, solid/bndl1, solid/bndl2, solid/lemm1/dmp1}
  std2 "Study 2"
    freq: Frequency "Frequency Domain" | plist = range(600,2.5,605); disabledphysics = solid/bndl2

Solver configurations
  sol1 "Solution 1" (study std1)
    v1: Variables "Dependent Variables 1"
    e1: Eigenvalue "Eigenvalue Solver 1" | eigvfunscale = maximum; eigvfunscaleparam = 4.74e-07
      dDef: Direct
  sol2 "Solution 2" (study std2)
    v1: Variables "Dependent Variables 1"
    s1: Stationary "Stationary Solver 1"
      p1: Parametric | pname = freq; plistarr = range(600,2.5,605); punit = Hz; pcontinuationmode = no
      fc1: FullyCoupled | linsolver = d1
      d1: Direct "Suggested Direct Solver (solid)" | linsolver = pardiso; pivotperturb = 1.0E-9

Datasets
  dset1: Solution | solution = sol1
  dset2: Solution | solution = sol2
  cpt1: CutPoint3D | data = dset2; pointx = P8x+1[cm]; pointy = P8y+1[cm]; pointz = P8z; bndsnap = on
  cpt2: CutPoint3D | data = dset1; pointx = P8x+ 2[cm]; pointy = P8y+2[cm]; pointz = P8z+0.5[cm]; bndsnap = on
  cpt3: CutPoint3D | data = dset1; pointx = P7x+8[cm]; pointy = P7y-1[cm]; pointz = P6z; bndsnap = on
  cpt4: CutPoint3D | data = dset1; pointx = P7x+4[cm]; pointy = P7y-1[cm]; pointz = P7z; bndsnap = on
  cpt5: CutPoint3D
    data = dset1
    pointx = (P5x+P6x+P7x+P8x)/4
    pointy = (P5y+P6y+P7y+P8y)/4
    pointz = (P5z+P6z+P7z+P8z)/4
    bndsnap = on
  surf1: Surface on boundaries 5, 9, 15, 21, 27 | data = dset2; param = xy

Derived values
  int1: IntVolume "Volume Integration 1" on domains 1, 3, 5 | data = dset1; table = tbl1; expr = dom; descr = Entity index

Evaluation groups
  std1EvgFrq: EvaluationGroup "Eigenfrequencies (Study 1)" | data = dset1
    gev1: EvalGlobal "Global Evaluation 1"
      data = dset1
      expr = {imag(freq)/abs(freq), abs(freq)/imag(freq)/2, solid.freq}
      unit = {1, 1, }
      descr = {Damping ratio, Quality factor, Frequency}
  std1mpf1: EvaluationGroup "Participation Factors (Study 1)" | data = dset1
    gev1: EvalGlobal "Global Evaluation 1"
      expr = {mpf1.pfLnormX, mpf1.pfLnormY, mpf1.pfLnormZ, mpf1.pfRnormX, mpf1.pfRnormY, mpf1.pfRnormZ, mpf1.mEffLX, mpf1.mEffLY, mpf1.mEffLZ, mpf1.mEffRX, mpf1.mEffRY, mpf1.mEffRZ}
      unit = {1, 1, 1, 1, 1, 1, kg, kg, kg, kg*m^2, kg*m^2, kg*m^2}
      descr = {"Participation factor, normalized, X-translation", "Participation factor, normalized, Y-translation", "Participation factor, normalized, Z-translation", "Participation factor, normalized, X-rotation", "Participation factor, normalized, Y-rotation", "Participation factor, normalized, Z-rotation", "Effective modal mass, X-translation", "Effective modal mass, Y-translation", "Effective modal mass, Z-translation", "Effective modal mass, X-rotation", "Effective modal mass, Y-rotation", "Effective modal mass, Z-rotation"}

Tables
  tbl1: Table
    // Volume Integration 1
    Eigenfrequency (Hz) | Entity index (m^3) | Entity index (m^3)
    695.764+5.88002i | 0.00144335 | 0.00144556
    797.304+6.4754i | 0.00144335 | 0.00144556
    1342.96+11.0618i | 0.00144335 | 0.00144556
    1533.1+13.2095i | 0.00144335 | 0.00144556
    1648.66+14.6535i | 0.00144335 | 0.00144556
    1776.56+16.3742i | 0.00144335 | 0.00144556
    2181.75+22.6734i | 0.00144335 | 0.00144556
    2314.77+25.0228i | 0.00144335 | 0.00144556
    2434.11+27.2488i | 0.00144335 | 0.00144556
    2550.59+29.5293i | 0.00144335 | 0.00144556
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
Plots
  pg1: PlotGroup3D "Mode Shape (solid)" | data = dset1
    surf1: Surface | data = dset1; expr = solid.disp
      def: Deform "Deformation" | expr = {u, v, w}; descr = Displacement field
  pg2: PlotGroup3D "Stress (solid)" | data = dset2
    surf1: Surface | expr = solid.mises
      def: Deform "Deformation" | expr = {u, v, w}; descr = Displacement field
  pg3: PlotGroup3D "Boundary Loads (solid)" | data = dset2
    arws1: ArrowSurface "Boundary Load 1" | expr = {solid.bndl1.F_Ax, solid.bndl1.F_Ay, solid.bndl1.F_Az}
      col: Color "Color Expression" | expr = solid.bndl1.F_A_Mag
      def: Deform "Deformation" | expr = {u, v, w}; descr = Displacement field
    surf1: Surface "Gray Surfaces" | expr = 1
      def: Deform "Deformation" | expr = {u, v, w}; descr = Displacement field
      sel1: Selection on boundaries 1-5, 8, 9, 14, 15, 21, 26, 27, 30
      tran1: Transparency | transparency = 0.8
  pg4: PlotGroup1D "1D Plot Group 4" | data = cpt1
    ptgr1: PointGraph | data = cpt2; expr = solid.disp

Exports
  data1: Data
    data = cpt5
    expr = solid.u_tZ
    unit = m/s
    descr = Velocity, Z component
    filename = C:\Users\utente\.comsol\v56\llmatlab\FRF2Params\wedge\H15.txt
    sort = on